// COMSOL Multiphysics 5.5.0.359 model "UnitSquareX_Source.mph"
// Outline of the model tree

Functions
  an1: Analytic "Q_top" | funcname = Qt; expr = 60*cos(4*pi*x); argunit = m; fununit = m/s

Geometry
  geom1 "Geometry 1" (2D, length unit m)
    sq1: Square
    c1: Circle "Circle for mesh refinement" (disabled) | pos = {0.75, 0.25}; r = 1e-3
    dif1: Difference (disabled) | input = sq1; input2 = c1
    pt2: Point | p = {0.9, 0.589}
    b4: BezierPolygon "Line for mesh refinement" (disabled)
      p = {{0.498, 0.498}, {0.61, 0.24}}
      degree = 1
      w = {1, 1}
      type = open
    b5: BezierPolygon "Line for mesh refinement2" (disabled)
      p = {{0.502, 0.502}, {0.61, 0.24}}
      degree = 1
      w = {1, 1}
      type = open
    b7: BezierPolygon "Line for mesh refinement 1" (disabled)
      p = {{0.76, 0.24}, {0.498, 0.498}}
      degree = 1
      w = {1, 1}
      type = open
    b8: BezierPolygon "Line for mesh refinement 1.1" (disabled)
      p = {{0.76, 0.24}, {0.502, 0.502}}
      degree = 1
      w = {1, 1}
      type = open
    pol6: Polygon | type = open; source = table; table = {{0, 0.25}, {0.5, 0}}
    pol7: Polygon | type = open; source = table; table = {{0.95, 0}, {0.85, 0.2}}
    pol8: Polygon | type = open; source = table; table = {{0, 0.75}, {0.85, 0}}
    pol11: Polygon | type = open; source = table; table = {{0.2, 0.25}, {1, 0.25}}
    pol12: Polygon | type = open; source = table; table = {{0.25, 0.6}, {0.2, 1}}
    pol13: Polygon | type = open; source = table; table = {{0.95, 1}, {0.75, 0.6}}
    pol14: Polygon | type = open; source = table; table = {{0, 0.65}, {1, 0.35}}
    pol15: Polygon | type = open; source = table; table = {{0.45, 1}, {0.5, 0.6}}
    pol16: Polygon | type = open; source = table; table = {{0, 0.3}, {1, 0.65}}
    pol18: Polygon | type = open; source = table; table = {{0.5, 0.6}, {1, 0.5}}
    fin: Finalize "Form Union"

Physics
  dl: DarcysLaw on all domains
    dependent variable p
    ShapeProperty.order_pressure = 2
    GravityEffects.IncludeGravity = 0
    dlm1: DarcysLawModel "Fluid and Matrix Properties 1" (default)
      rho_mat = userdef
      rho = 1000
      mu_mat = userdef
      mu = 2
      epsilon_mat = userdef
      epsilon = 1
      kappa_mat = userdef
      kappa = 3
    nf1: NoFlow (default)
    init1: init "Initial Values 1" (default)
    mf1: MassFlux (disabled) on boundaries 11, 16, 20, 33 | N0 = 60*cos(4*pi*x[1/m])*1000[kg/m^2/s]
    well1: Well on points 21 | dw = 2e-3; p0 = 3
    pr6: Pressure on boundaries 15, 29 | p0 = -5
    pr5: Pressure (disabled) on boundaries 4, 6, 8, 10, 12-15, 17-19, 22-28, 31 | p0 = -5
    pr7: Pressure on boundaries 4, 31 | p0 = 3
    pr8: Pressure on boundaries 6, 8, 10, 12-14, 17-19, 22-28 | p0 = -5+8*(1-y[1/m])[Pa]

Mesh
  mesh1 "RefMesh"
    size: MeshSizeDefault | hmax = 0.02; hmin = 7.5E-5; hauto = 2
    ftri1: FreeTri "Free Triangular 1" on remaining entities
    ada1: Adapt (disabled) on entire geometry | method = modify; globalminpar = 1

Studies
  std1 "Study 1"
    stat: Stationary

Solver configurations
  sol1 "Solution 1" (study std1)
    v1: Variables "Dependent Variables 1"
    s1: Stationary "Stationary Solver 1"
      dDef: Direct
      fc1: FullyCoupled | linsolver = dDef

Datasets
  dset1: Solution | solution = sol1
  cln1: CutLine2D | data = dset1; genpoints = {{0.0, 0.59}, {1, 0.59}}
  edg1: Edge2D on boundaries 1-3, 5, 7, 9, 11, 16, 20, 21, 30, 32-38 | data = dset1
  cpt1: CutPoint2D "L2_Err_Pts" | data = dset1; method = regulargrid; regulargridx = 40; regulargridy = 40
  cpt2: CutPoint2D "Center" | data = dset1; pointx = 0.5; pointy = 0.5
  cpt3: CutPoint2D "SamplePts"
    data = dset1
    method = file
    filename = E:\CodeRepo\PyDFN3D\Examples\Verification\UnitSquareSamplePts.txt
  cln2: CutLine2D "TraceCut" | data = dset1; genpoints = {{0, 0.752}, {0.852, 0}}

Derived values
  pev1: EvalPoint "Point Evaluation 1"
    data = cpt2
    table = new
    expr = {p, dl.u, dl.v}
    unit = {Pa, m/s, m/s}
    descr = {Pressure, "Darcy's velocity field, X component", "Darcy's velocity field, Y component"}
  av1: AvSurface "Avg_h" on domains 1-11 | data = dset1; table = new; expr = h; unit = m; descr = Element size
  pev2: EvalPoint "SamplePointP" | data = cpt3; table = tbl1; expr = p; descr = Pressure
  pev3: EvalPoint "SamplePointU" | data = cpt3; table = tbl2; expr = dl.u
  pev4: EvalPoint "SamplePtsV" | data = cpt3; table = tbl3; expr = dl.v

Tables
  tbl1: Table
    // SamplePointEval
    Pressure (Pa), Point: (0.05, 0.05) | Pressure (Pa), Point: (0.097368, 0.05) | Pressure (Pa), Point: (0.14474, 0.05) | Pressure (Pa), Point: (0.19211, 0.05) | Pressure (Pa), Point: (0.23947, 0.05) | Pressure (Pa), Point: (0.28684, 0.05) | Pressure (Pa), Point: (0.33421, 0.05) | Pressure (Pa), Point: (0.38158, 0.05) | Pressure (Pa), Point: (0.42895, 0.05) | Pressure (Pa), Point: (0.47632, 0.05) | Pressure (Pa), Point: (0.52368, 0.05) | Pressure (Pa), Point: (0.57105, 0.05)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
    -4.97953 | -4.98784 | -4.87799 | -4.54201 | -3.95152 | -3.19309 | -2.48414 | -2.43841 | -2.82131 | -3.11509 | -3.25728 | -3.26245
  tbl2: Table
    // SamplePointU
    Darcy's velocity field, X component (m/s), Point: (0.05, 0.05) | Darcy's velocity field, X component (m/s), Point: (0.097368, 0.05) | Darcy's velocity field, X component (m/s), Point: (0.14474, 0.05) | Darcy's velocity field, X component (m/s), Point: (0.19211, 0.05) | Darcy's velocity field, X component (m/s), Point: (0.23947, 0.05) | Darcy's velocity field, X component (m/s), Point: (0.28684, 0.05) | Darcy's velocity field, X component (m/s), Point: (0.33421, 0.05) | Darcy's velocity field, X component (m/s), Point: (0.38158, 0.05) | Darcy's velocity field, X component (m/s), Point: (0.42895, 0.05) | Darcy's velocity field, X component (m/s), Point: (0.47632, 0.05) | Darcy's velocity field, X component (m/s), Point: (0.52368, 0.05) | Darcy's velocity field, X component (m/s), Point: (0.57105, 0.05)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
    0.376464 | 0.0876767 | -7.42958 | -14.6996 | -22.0259 | -25.2196 | -15.3582 | 10.0574 | 11.6891 | 6.8424 | 2.26903 | -1.95415
  tbl3: Table
    // Point Evaluation 4
    Darcy's velocity field, Y component (m/s), Point: (0.05, 0.05) | Darcy's velocity field, Y component (m/s), Point: (0.097368, 0.05) | Darcy's velocity field, Y component (m/s), Point: (0.14474, 0.05) | Darcy's velocity field, Y component (m/s), Point: (0.19211, 0.05) | Darcy's velocity field, Y component (m/s), Point: (0.23947, 0.05) | Darcy's velocity field, Y component (m/s), Point: (0.28684, 0.05) | Darcy's velocity field, Y component (m/s), Point: (0.33421, 0.05) | Darcy's velocity field, Y component (m/s), Point: (0.38158, 0.05) | Darcy's velocity field, Y component (m/s), Point: (0.42895, 0.05) | Darcy's velocity field, Y component (m/s), Point: (0.47632, 0.05) | Darcy's velocity field, Y component (m/s), Point: (0.52368, 0.05) | Darcy's velocity field, Y component (m/s), Point: (0.57105, 0.05)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
    -0.587985 | 0.268492 | -1.77981 | -10.7951 | -29.6401 | -54.5885 | -83.2213 | -81.4028 | -64.2873 | -54.8804 | -50.7667 | -50.5969

Plots
  pg1: PlotGroup2D "Pressure (dl)" | data = dset1
    surf1: Surface | expr = p
    str1: Streamline (disabled) on boundaries 1, 3, 5, 7, 9 | expr = {dl.u, dl.v}
    mesh1: Mesh (disabled)
  pg3: PlotGroup2D "Velocity" | data = dset1
    surf1: Surface | expr = sqrt(dl.u^2+dl.v^2)
  pg5: PlotGroup2D "VelocityVector" | data = dset1
    arws1: ArrowSurface | expr = {dl.u, dl.v}; xnumber = 25; ynumber = 25; arrowlength = normalized
  pg2: PlotGroup1D "Cut Line_PUV" | data = dset1
    lngr1: LineGraph "p" | data = cln1; expr = p; legends = p
    lngr2: LineGraph "u" | data = cln1; expr = dl.u; descr = Darcy's velocity field, X component; legends = u
    lngr3: LineGraph "v" | data = cln1; expr = dl.v; legends = v
    lngr4: LineGraph "U" | data = cln1; expr = sqrt(dl.u^2+dl.v^2)
  pg4: PlotGroup1D "Edge_PUV" | data = dset1
    lngr1: LineGraph "p" | data = edg1; expr = p; xdata = reversedarc; legends = p
    lngr2: LineGraph "u" | data = edg1; expr = dl.u; xdata = reversedarc; legends = u
    lngr3: LineGraph "v" | data = edg1; expr = dl.v; xdata = reversedarc; legends = v
  pg6: PlotGroup2D "h" | data = dset1
  pg7: PlotGroup1D "Trace_PUV 1" | data = dset1
    lngr1: LineGraph "p" | data = cln2; expr = p; xdata = expr; xdataexpr = x; legends = p
    lngr2: LineGraph "u"
      data = cln2
      expr = dl.u
      descr = Darcy's velocity field, X component
      xdata = expr
      xdataexpr = x
      legends = u
    lngr3: LineGraph "v" | data = cln2; expr = dl.v; xdata = expr; xdataexpr = x; legends = v
    lngr4: LineGraph "U" | data = cln2; expr = sqrt(dl.u^2+dl.v^2); xdata = expr; xdataexpr = x

Exports
  plot2: Plot | exporttype = vtu; filename = F:\1. PyBEM2D\Acclerated\PyBEM2D\Examples\Verification\UnitSquare_LGR.vtu
  plot1: Plot | filename = C:\Users\pc\Documents\GitHub\PyDFN3D\Examples\Verification\UnitSquareTS_p.csv
  plot3: Plot | filename = C:\Users\pc\Documents\GitHub\PyDFN3D\Examples\Verification\UnitSquareTS_u.csv
  plot4: Plot | filename = C:\Users\pc\Documents\GitHub\PyDFN3D\Examples\Verification\UnitSquareTS_v.csv
  tbl1: Table | table = tbl1; filename = E:\CodeRepo\PyDFN3D\Examples\Verification\UnitSquareSampleP.csv
  tbl2: Table | table = tbl2; filename = E:\CodeRepo\PyDFN3D\Examples\Verification\UnitSquareSampleU.csv
  tbl3: Table | table = tbl3; filename = E:\CodeRepo\PyDFN3D\Examples\Verification\UnitSquareSampleV.csv
  plot5: Plot | filename = C:\Users\pc\Documents\GitHub\PyDFN3D\Examples\Verification\UnitSquareTrace_p.csv
  plot6: Plot | filename = C:\Users\pc\Documents\GitHub\PyDFN3D\Examples\Verification\UnitSquareTrace_Vel.csv